// COMSOL Multiphysics 6.1.0.282 model "Multi_Particle_Mixed_AR_C33_C13_ESO_BTO_composite_1000x1000x1000.mph"
// Outline of the model tree

Parameters
  a = 1000[nm]
  e0 = 1e-4
  volfrac = 0.010125
  r = ((volfrac*a*a*a*21)/(22*4))^(1/3)
  r_H = ((volfrac*a*a*a*21)/(22*4*alpha))^(1/3)
  r_G = ((volfrac*a*a*a*21)/(22*4*beta))^(1/3)
  alpha = 1.3
  beta = 1.15
  H = r_H*alpha
  G = r_G*beta

Variables
  var1 "Variables 1"
    E_m = 34e6  // Elastic modulus of ESO
    nu_m = 0.4  // Poisson's ratio of ESO
    C22_m = C11_m
    C33_m = C11_m
    C11_m = (E_m*(1-nu_m))/((1+nu_m)*(1-(2*nu_m)))
    C12_m = (E_m*nu_m)/((1+nu_m)*(1-(2*nu_m)))
    C13_m = C12_m
    C23_m = C12_m
    C44_m = (C11_m-C12_m)/2
    C55_m = (C11_m-C12_m)/2
    C66_m = (C11_m-C12_m)/2

Geometry
  geom1 "Geometry 1" (3D, length unit nm)
    blk1: Block "ESO Matrix" | base = center; size = {a, a, a}
    elp1: Ellipsoid "Ellipsoid_1 AR_1.3" | pos = {27.63*10, 26.42*10, 23.19*10}; semiaxes = {r_H, r_H, H}
    elp2: Ellipsoid "Ellipsoid_4 AR_1.3" | pos = {-1.8764*10, -0.11803*10, 0.5702*10}; semiaxes = {r_H, r_H, H}
    elp3: Ellipsoid "Ellipsoid_2 AR_1.15" | pos = {27.9699*10, -23.6081*10, -24.3184*10}; semiaxes = {r_G, r_G, G}
    elp4: Ellipsoid "Ellipsoid_5 AR_1.15" | pos = {-21.9012*10, 27.2484*10, -25.394*10}; semiaxes = {r_G, r_G, G}
    elp5: Ellipsoid "Ellipsoid_7 AR_1.15" | pos = {-22.24*10, -27.62*10, 25.5107*10}; semiaxes = {r_G, r_G, G}
    sph1: Sphere "Sphere_3 AR_1.0" | pos = {-27.500*10, -23.10*10, -25.00*10}; r = r
    sph2: Sphere "Sphere_7 AR_1.0" | pos = {24.63*10, -26.42*10, 20.19*10}; r = r
    sph3: Sphere "Sphere_8 AR_1.0" | pos = {-26.24*10, 26.32*10, 25.00*10}; r = r
    sph4: Sphere "Sphere_9 AR_1.0" | pos = {22.8096*10, 24.1081*10, -24.93184*10}; r = r
    mov1: Move
      input = blk1, elp1, elp2, elp3, elp4, elp5, sph1, sph2, sph3, sph4
      displx = a/2
      disply = a/2
      displz = a/2
    fin: Finalize "Form Union"

Materials
  mat2: Common "ESO" on domains 1
    def "Basic"
      density = 1010
    StressCharge "Stress-charge form"
      cE = {72.857e+6[Pa], 48.5714e+6[Pa], 48.5714e+6[Pa], 0[Pa], 0, 0, 48.5714e+6[Pa], 72.857e+6[Pa], 48.5714e+6[Pa], 0[Pa], 0, 0, 48.5714e+6[Pa], 48.5714e+6[Pa], 72.857e+6[Pa], 0[Pa], 0, 0, 0[Pa], 0[Pa], 0[Pa], 12.1428e+6[Pa], 0, 0, 0, 0, 0, 0, 12.1428e+6[Pa], 0, 0, 0, 0, 0, 0, 12.1428e+6[Pa]}
      eES = {0, 0, 0, 0, 0, 0, 0, 0, 0, 0, 0, 0, 0, 0, 0, 0, 0, 0}
      epsilonrS = 3.38
      eta_cE = {0, 0, 0, 0, 0, 0, 0, 0, 0, 0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}
      eta_eES = {0, 0, 0, 0, 0, 0, 0, 0, 0, 0, 0, 0, 0, 0, 0, 0, 0, 0}
      eta_epsilonS = 0
  mat3: Common "Barium Titanate" on domains 2-10
    def "Basic"
      relpermittivity = diag{1976.8, 1976.8, 111.7}
      density = 6020[kg/m^3]
    StrainCharge "Strain-charge form"
      sE = {8.05e-012[1/Pa], -2.35e-012[1/Pa], -5.24e-012[1/Pa], 0[1/Pa], 0[1/Pa], 0[1/Pa], -2.35e-012[1/Pa], 8.05e-012[1/Pa], -5.24e-012[1/Pa], 0[1/Pa], 0[1/Pa], 0[1/Pa], -5.24e-012[1/Pa], -5.24e-012[1/Pa], 1.57e-011[1/Pa], 0[1/Pa], 0[1/Pa], 0[1/Pa], 0[1/Pa], 0[1/Pa], 0[1/Pa], 1.84e-011[1/Pa], 0[1/Pa], 0[1/Pa], 0[1/Pa], 0[1/Pa], 0[1/Pa], 0[1/Pa], 1.84e-011[1/Pa], 0[1/Pa], 0[1/Pa], 0[1/Pa], 0[1/Pa], 0[1/Pa], 0[1/Pa], 8.84e-012[1/Pa]}
      dET = {0[C/N], 0[C/N], -3.45e-011[C/N], 0[C/N], 0[C/N], -3.45e-011[C/N], 0[C/N], 0[C/N], 8.56e-011[C/N], 0[C/N], 3.92e-010[C/N], 0[C/N], 3.92e-010[C/N], 0[C/N], 0[C/N], 0[C/N], 0[C/N], 0[C/N]}
      epsilonrT = diag{2920, 2920, 168}
      eta_sE = {0, 0, 0, 0, 0, 0, 0, 0, 0, 0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}
      eta_dET = {0, 0, 0, 0, 0, 0, 0, 0, 0, 0, 0, 0, 0, 0, 0, 0, 0, 0}
      eta_epsilonT = 0
    StressCharge "Stress-charge form"
      cE = {2.75121e+011[Pa], 1.78967e+011[Pa], 1.51555e+011[Pa], 0[Pa], 0[Pa], 0[Pa], 1.78967e+011[Pa], 2.75121e+011[Pa], 1.51555e+011[Pa], 0[Pa], 0[Pa], 0[Pa], 1.51555e+011[Pa], 1.51555e+011[Pa], 1.6486e+011[Pa], 0[Pa], 0[Pa], 0[Pa], 0[Pa], 0[Pa], 0[Pa], 5.43478e+010[Pa], 0[Pa], 0[Pa], 0[Pa], 0[Pa], 0[Pa], 0[Pa], 5.43478e+010[Pa], 0[Pa], 0[Pa], 0[Pa], 0[Pa], 0[Pa], 0[Pa], 1.13122e+011[Pa]}
      eES = {0[C/m^2], 0[C/m^2], -2.69289[C/m^2], 0[C/m^2], 0[C/m^2], -2.69289[C/m^2], 0[C/m^2], 0[C/m^2], 3.65468[C/m^2], 0[C/m^2], 21.3043[C/m^2], 0[C/m^2], 21.3043[C/m^2], 0[C/m^2], 0[C/m^2], 0[C/m^2], 0[C/m^2], 0[C/m^2]}
      epsilonrS = diag{1976.8, 1976.8, 111.7}
      eta_cE = {0, 0, 0, 0, 0, 0, 0, 0, 0, 0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}
      eta_eES = {0, 0, 0, 0, 0, 0, 0, 0, 0, 0, 0, 0, 0, 0, 0, 0, 0, 0}
      eta_epsilonS = 0

Physics
  solid: SolidMechanics on all domains
    dependent variable u = {u, v, w}
    lemm1: LinearElasticModel "Linear Elastic Material 1" (default)
      SolidModel = Anisotropic
      AnisotropicOption = AnisotropicVo
    free1: Free (default)
    init1: init "Initial Values 1" (default)
    pzm1: PiezoelectricMaterialModel "Piezoelectric Material 1" on all domains
    disp1: Displacement2 "Prescribed Displacement 1" on boundaries 1 | Direction = {1, 0, 0}
    disp2: Displacement2 "Prescribed Displacement 2" on boundaries 2 | Direction = {0, 1, 0}
    disp3: Displacement2 "Prescribed Displacement 3" on boundaries 3 | Direction = {0, 0, 1}
    disp4: Displacement2 "Prescribed Displacement 4" on boundaries 78 | Direction = {1, 0, 0}; U0 = {0, 0, 0}
    disp5: Displacement2 "Prescribed Displacement 5" on boundaries 5 | Direction = {0, 1, 0}; U0 = {0, 0, 0}
    disp6: Displacement2 "Prescribed Displacement 6" on boundaries 4 | Direction = {0, 0, 1}; U0 = {0, 0, z*e0}
  es: Electrostatics on all domains
    dependent variable V
    ccn1: ChargeConservation (default) | materialType = from_mat
    zc1: ZeroCharge (default)
    init1: init "Initial Values 1" (default)
    ccnp1: ChargeConservationPiezo "Charge Conservation, Piezoelectric 1" on all domains
    gnd1: Ground on boundaries 1-5, 78

Multiphysics
  pze1: PiezoelectricEffect on all domains | Solid_physics = solid; Electrostatics_physics = es

Mesh
  mesh1 "Mesh 1" (physics-controlled)
    size: MeshSizeDefault | hauto = 4

Studies
  std1 "Study 1"
    param: Parametric "Parametric Sweep"
      sweeptype = filled
      pname = volfrac
      plistarr = range(0.001125,0.001125,0.03375)
    stat: Stationary

Solver configurations
  sol1 "Solution 1" (study std1)
    v1: Variables "Dependent Variables 1"
    s1: Stationary "Stationary Solver 1" | stol = 0.002
      fc1: FullyCoupled | linsolver = d1
      d1: Direct "Suggested Direct Solver (pze1) (merged)" | linsolver = pardiso; pivotperturb = 1.0E-9
  sol2 "Parametric Solutions 1" (study std1)

Datasets
  dset1: Solution | solution = sol1
  dset2: Solution | solution = sol2

Derived values
  int5: IntVolume "Stress33" on all domains | data = dset1; table = tbl1; expr = solid.sz/(a*a*a); unit = N/m^2
  int8: IntVolume "Stress11" on all domains | data = dset1; table = tbl2; expr = solid.sx/(a*a*a); unit = N/m^2
  int9: IntVolume "Strain33" on all domains | data = dset1; table = tbl3; expr = solid.eZZ/(a*a*a); unit = 1
  int10: IntVolume "All Data" on all domains
    data = dset2
    table = tbl4
    expr = {solid.sz/(a*a*a), solid.sx/(a*a*a), solid.eZZ/(a*a*a)}
    unit = {N/m^2, N/m^2, 1}

Tables
  tbl1: Table
    // Stress33
    solid.sz/(a*a*a) (N/m^2)
    13743.2
  tbl2: Table
    // Stress11
    solid.sx/(a*a*a) (N/m^2)
    6871.67
  tbl3: Table
    // Strain33
    solid.eZZ/(a*a*a) (1)
    0.0001
  tbl4: Table
    // All Data
    volfrac | solid.sz/(a*a*a) (N/m^2) | solid.sx/(a*a*a) (N/m^2) | solid.eZZ/(a*a*a) (1)
    0.001125 | 7403.51 | 4912.72 | 0.0001
    0.00225 | 7524.64 | 4969.02 | 0.0001
    0.003375 | 7649.46 | 5025.96 | 0.0001
    0.0045 | 7778.01 | 5083.63 | 0.0001
    0.005625 | 7910.13 | 5142.06 | 0.0001
    0.00675 | 8046.3 | 5201.17 | 0.0001
    0.007875 | 8187.13 | 5261.1 | 0.0001
    0.009 | 8332.42 | 5321.58 | 0.0001
    0.010125 | 8482.56 | 5382.85 | 0.0001
    0.01125 | 8637.94 | 5444.81 | 0.0001
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
Plots
  pg1: PlotGroup3D "Stress (solid)" | data = dset1
    surf1: Surface | expr = solid.eZZ
      def: Deform "Deformation" | expr = {u, v, w}; descr = Displacement field
  pg2: PlotGroup3D "Electric Potential (es)" | data = dset1
    mslc1: Multislice | expr = V