// COMSOL Multiphysics 6.1.0.282 model "Fig1g_C33_C13_voids_PMNPT_aligned_0pt03.mph"
// Outline of the model tree

Parameters
  e0 = 1e-4
  vol = 25[m]*25[m]*25[m]

Geometry
  geom1 "Geometry 1" (3D, length unit m)
    imp1: Import "matrix"
      sellayershow = dom
      type = cad
      filename = /home/mslab/Desktop/Abhishek_PhD/COMSOL/Ellipsoid/Align/Updated/with voids/aligned/0pt03/void_trial_vf_0pt03_ellipsoid_abhishek_voids_MATRIX_uncut.xmt_txt
      fillholes = on
    imp2: Import "fiber"
      sellayershow = dom
      type = cad
      filename = /home/mslab/Desktop/Abhishek_PhD/COMSOL/Ellipsoid/Align/Updated/with voids/aligned/0pt03/void_trial_vf_0pt03_ellipsoid_abhishek_voids_fIBER.xmt_txt
      fillholes = on
    imp3: Import "void"
      sellayershow = dom
      type = cad
      filename = /home/mslab/Desktop/Abhishek_PhD/COMSOL/Ellipsoid/Align/Updated/with voids/aligned/0pt03/void_trial_vf_0pt03_ellipsoid_abhishek_voids_void.xmt_txt
      fillholes = on
    fin: Finalize "Form Union"

Materials
  mat1: Common "PDMS_Abhishek 2" on domains 1
    def "Basic"
      thermalexpansioncoefficient = 9e-4[1/K]
      heatcapacity = 1460[J/(kg*K)]
      relpermittivity = 2.75
      density = 970[kg/m^3]
      thermalconductivity = 0.16[W/(m*K)]
    StressCharge "Stress-charge form"
      cE = {2.45e+06[Pa], 816000[Pa], 816000[Pa], 0, 0, 0, 816000[Pa], 2.45e+06[Pa], 816000[Pa], 0, 0, 0, 816000[Pa], 816000[Pa], 2.45e+06[Pa], 0, 0, 0, 0, 0, 0, 1.63e+06[Pa], 0, 0, 0, 0, 0, 0, 1.63e+06[Pa], 0, 0, 0, 0, 0, 0, 1.63e+06[Pa]}
      eES = {0, 0, 0, 0, 0, 0, 0, 0, 0, 0, 0, 0, 0, 0, 0, 0, 0, 0}
      epsilonrS = 2.4
      eta_cE = {0, 0, 0, 0, 0, 0, 0, 0, 0, 0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}
      eta_eES = {0, 0, 0, 0, 0, 0, 0, 0, 0, 0, 0, 0, 0, 0, 0, 0, 0, 0}
      eta_epsilonS = 0
  mat2: Common "PMN-PT_ABhishek_new 1" on domains 2-6, 8, 13-15, 17, 18, 21, 22, 25, 26, 30, 31
    def "Basic"
      density = 8157[kg/m^3]
    StrainCharge "Strain-charge form"
      sE = {1.41e-011[1/Pa], -4.76e-012[1/Pa], -6.46e-012[1/Pa], 0[1/Pa], 0[1/Pa], 0[1/Pa], -4.76e-012[1/Pa], 1.41e-011[1/Pa], -6.46e-012[1/Pa], 0[1/Pa], 0[1/Pa], 0[1/Pa], -6.46e-012[1/Pa], -6.46e-012[1/Pa], 1.72e-011[1/Pa], 0[1/Pa], 0[1/Pa], 0[1/Pa], 0[1/Pa], 0[1/Pa], 0[1/Pa], 4.67e-011[1/Pa], 0[1/Pa], 0[1/Pa], 0[1/Pa], 0[1/Pa], 0[1/Pa], 0[1/Pa], 4.67e-011[1/Pa], 0[1/Pa], 0[1/Pa], 0[1/Pa], 0[1/Pa], 0[1/Pa], 0[1/Pa], 3.77e-011[1/Pa]}
      dET = {0[C/N], 0[C/N], -395e-012[C/N], 0[C/N], 0[C/N], -395e-012[C/N], 0[C/N], 0[C/N], 800e-012[C/N], 0[C/N], 1090e-012[C/N], 0[C/N], 1090e-012[C/N], 0[C/N], 0[C/N], 0[C/N], 0[C/N], 0[C/N]}
      epsilonrT = diag{5660, 5660, 6990}
      eta_sE = {0, 0, 0, 0, 0, 0, 0, 0, 0, 0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}
      eta_dET = {0, 0, 0, 0, 0, 0, 0, 0, 0, 0, 0, 0, 0, 0, 0, 0, 0, 0}
      eta_epsilonT = 0
    StressCharge "Stress-charge form"
      cE = {13.8e+010[Pa], 8.50e+010[Pa], 8.40+010[Pa], 0[Pa], 0[Pa], 0[Pa], 8.50e+010[Pa], 13.8e+010[Pa], 8.40e+010[Pa], 0[Pa], 0[Pa], 0[Pa], 8.40e+010[Pa], 8.40e+010[Pa], 12.2e+010[Pa], 0[Pa], 0[Pa], 0[Pa], 0[Pa], 0[Pa], 0[Pa], 2.14e+010[Pa], 0[Pa], 0[Pa], 0[Pa], 0[Pa], 0[Pa], 0[Pa], 2.14e+010[Pa], 0[Pa], 0[Pa], 0[Pa], 0[Pa], 0[Pa], 0[Pa], 2.65e+010[Pa]}
      eES = {0[C/m^2], 0[C/m^2], -20.8[C/m^2], 0[C/m^2], 0[C/m^2], -20.8[C/m^2], 0[C/m^2], 0[C/m^2], 30.9[C/m^2], 0[C/m^2], 23.2[C/m^2], 0[C/m^2], 23.2[C/m^2], 0[C/m^2], 0[C/m^2], 0[C/m^2], 0[C/m^2], 0[C/m^2]}
      epsilonrS = diag{2810, 2810, 2330}
      eta_cE = {0, 0, 0, 0, 0, 0, 0, 0, 0, 0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}
      eta_eES = {0, 0, 0, 0, 0, 0, 0, 0, 0, 0, 0, 0, 0, 0, 0, 0, 0, 0}
      eta_epsilonS = 0
  mat3: Common "Air_abhishek" on domains 7, 9-12, 16, 19, 20, 23, 24, 27-29, 32-38
    def "Basic"
      relpermeability = 1
      relpermittivity = 1
      dynamicviscosity = eta(T[1/K])[Pa*s]
      ratioofspecificheat = 1.4
      electricconductivity = 0[S/m]
      heatcapacity = Cp(T[1/K])[J/(kg*K)]
      density = rho(pA[1/Pa],T[1/K])[kg/m^3]
      thermalconductivity = k(T[1/K])[W/(m*K)]
      soundspeed = cs(T[1/K])[m/s]
      eta: Piecewise | arg = T; pieces = {200.0, 1600.0, -8.38278E-7+8.35717342E-8*T^1-7.69429583E-11*T^2+4.6437266E-14*T^3-1.06585607E-17*T^4}
      Cp: Piecewise | arg = T; pieces = {200.0, 1600.0, 1047.63657-0.372589265*T^1+9.45304214E-4*T^2-6.02409443E-7*T^3+1.2858961E-10*T^4}
      rho: Analytic | expr = pA*0.02897/8.314/T; args = {pA, T}; dermethod = manual; argders = {{pA, d(pA*0.02897/8.314/T,pA)}, {T, d(pA*0.02897/8.314/T,T)}}
      k: Piecewise | arg = T; pieces = {200.0, 1600.0, -0.00227583562+1.15480022E-4*T^1-7.90252856E-8*T^2+4.11702505E-11*T^3-7.43864331E-15*T^4}
      cs: Analytic | expr = sqrt(1.4*287*T); args = T; dermethod = manual; argders = {T, d(sqrt(1.4*287*T),T)}
    RefractiveIndex
      n = 1
      ki = 0
    StressCharge "Stress-charge form"
      cE = {101000[Pa], 0, 0, 0, 0, 0, 0, 101000[Pa], 0, 0, 0, 0, 0, 0, 101000[Pa], 0, 0, 0, 0, 0, 0, 101000[Pa], 0, 0, 0, 0, 0, 0, 101000[Pa], 0, 0, 0, 0, 0, 0, 101000[Pa]}
      eES = {0, 0, 0, 0, 0, 0, 0, 0, 0, 0, 0, 0, 0, 0, 0, 0, 0, 0}
      epsilonrS = 1
      eta_cE = {0, 0, 0, 0, 0, 0, 0, 0, 0, 0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}
      eta_eES = {0, 0, 0, 0, 0, 0, 0, 0, 0, 0, 0, 0, 0, 0, 0, 0, 0, 0}
      eta_epsilonS = 0

Physics
  solid: SolidMechanics on all domains
    dependent variable u = {u, v, w}
    lemm1: LinearElasticModel "Linear Elastic Material 1" (default)
    free1: Free (default)
    init1: init "Initial Values 1" (default)
    pzm1: PiezoelectricMaterialModel "Piezoelectric Material 1" on all domains
    disp1: Displacement2 "Prescribed Displacement 1" on boundaries 1 | Direction = {1, 0, 0}
    disp2: Displacement2 "Prescribed Displacement 2" on boundaries 80 | Direction = {1, 0, 0}; U0 = {0, 0, 0}
    disp3: Displacement2 "Prescribed Displacement 3" on boundaries 2 | Direction = {0, 1, 0}
    disp4: Displacement2 "Prescribed Displacement 4" on boundaries 5 | Direction = {0, 1, 0}; U0 = {0, 0, 0}
    disp5: Displacement2 "Prescribed Displacement 5" on boundaries 3 | Direction = {0, 0, 1}
    disp6: Displacement2 "Prescribed Displacement 6" on boundaries 4 | Direction = {0, 0, 1}; U0 = {0, 0, z*e0}
  es: Electrostatics on all domains
    dependent variable V
    ccn1: ChargeConservation (default)
    zc1: ZeroCharge (default)
    init1: init "Initial Values 1" (default)
    ccnp1: ChargeConservationPiezo "Charge Conservation, Piezoelectric 1" on all domains
    pot1: ElectricPotential on boundaries 1-5, 80

Multiphysics
  pze1: PiezoelectricEffect on all domains | Solid_physics = solid; Electrostatics_physics = es

Mesh
  mesh1 "Mesh 1"
    size: MeshSizeDefault | hmax = 2.5; hmin = 0.45; hcurve = 0.6; hnarrow = 0.5; hgrad = 1.5
    ftet1: FreeTet "Free Tetrahedral 1" on remaining entities | method = dellegacy52

Studies
  std1 "Study 1"
    stat: Stationary

Solver configurations
  sol1 "Solution 1" (study std1)
    v1: Variables "Dependent Variables 1"
    s1: Stationary "Stationary Solver 1"
      dDef: Direct
      fc1: FullyCoupled | linsolver = dDef

Datasets
  dset1: Solution | solution = sol1

Derived values
  int1: IntVolume "stress 33" on all domains | data = dset1; table = tbl8; expr = solid.sz/(25[m]*25[m]*25[m])
  int2: IntVolume "strain 33" on all domains | data = dset1; table = tbl9; expr = solid.eZZ/(25[m]*25[m]*25[m])
  int3: IntVolume "stress 11" on all domains | data = dset1; table = tbl10; expr = solid.sx/(25[m]*25[m]*25[m])

Tables
  tbl1: Table
    // stress 11 (solid.sx/(25[m]*25[m]*25[m]))
    solid.sx/(25[m]*25[m]*25[m]) (N/m^2)
    255.204
  tbl3: Table
    // strain 11 (solid.eXX/(25[m]*25[m]*25[m]))
    solid.eXX/(25[m]*25[m]*25[m]) (1)
    0.0001
  tbl4: Table
    // stress 22 (solid.sy/(25[m]*25[m]*25[m]))
    solid.sy/(25[m]*25[m]*25[m]) (N/m^2)
    84.5104
  tbl5: Table
    // stress 22 (solid.sy/(25[m]*25[m]*25[m]))
    solid.sy/(25[m]*25[m]*25[m]) (N/m^2)
    254.693
  tbl6: Table
    // strain 22 (solid.eYY/(25[m]*25[m]*25[m]))
    solid.eYY/(25[m]*25[m]*25[m]) (1)
    0.0001
  tbl7: Table
    // stress 33 (solid.sz/(25[m]*25[m]*25[m]))
    solid.sz/(25[m]*25[m]*25[m]) (N/m^2)
    84.8203
  tbl8: Table
    // stress 33 (solid.sz/(25[m]*25[m]*25[m]))
    solid.sz/(25[m]*25[m]*25[m]) (N/m^2)
    266.954
  tbl9: Table
    // strain 33 (solid.eZZ/(25[m]*25[m]*25[m]))
    solid.eZZ/(25[m]*25[m]*25[m]) (1)
    0.0001
  tbl10: Table
    // stress 11 (solid.sx/(25[m]*25[m]*25[m]))
    solid.sx/(25[m]*25[m]*25[m]) (N/m^2)
    84.8016

Plots
  pg1: PlotGroup3D "Stress (solid)" | data = dset1
    surf1: Surface | expr = solid.mises
      def: Deform "Deformation" | expr = {u, v, w}; descr = Displacement field (Material)
  pg2: PlotGroup3D "Electric Potential (es)" | data = dset1
    mslc1: Multislice | expr = V; constUnit = {m, m, m}