// COMSOL Multiphysics 6.1.0.282 model "e15_k11.mph"
// Outline of the model tree

Parameters
  a1 = 60[nm]
  vol = a1*a1*a1
  vf = 0.65
  alpha = 1
  beta = 1/1.6
  a = ((vf*(2*a1)^3*3*alpha*beta)/(8*4*pi))^(1/3)
  e0 = 1e-4

Geometry
  geom1 "Geometry 1" (3D, length unit m)
    blk1: Block | base = center; size = {2*a1, 2*a1, 2*a1}
    elp1: Ellipsoid | semiaxes = {a, a/alpha, a/beta}
    elp2: Ellipsoid | pos = {a1, 0, 0}; semiaxes = {a, a/alpha, a/beta}
    elp3: Ellipsoid | pos = {-a1, 0, 0}; semiaxes = {a, a/alpha, a/beta}
    elp4: Ellipsoid | pos = {a1, a1, 0}; semiaxes = {a, a/alpha, a/beta}
    elp5: Ellipsoid | pos = {a1, -a1, 0}; semiaxes = {a, a/alpha, a/beta}
    elp6: Ellipsoid | pos = {-a1, -a1, 0}; semiaxes = {a, a/alpha, a/beta}
    elp7: Ellipsoid | pos = {-a1, a1, 0}; semiaxes = {a, a/alpha, a/beta}
    elp8: Ellipsoid | pos = {0, a1, 0}; semiaxes = {a, a/alpha, a/beta}
    elp9: Ellipsoid | pos = {0, -a1, 0}; semiaxes = {a, a/alpha, a/beta}
    elp10: Ellipsoid | pos = {a1/2, a1/2, a1}; semiaxes = {a, a/alpha, a/beta}
    elp11: Ellipsoid | pos = {a1/2, a1/2, -a1}; semiaxes = {a, a/alpha, a/beta}
    elp12: Ellipsoid | pos = {a1/2, -a1/2, a1}; semiaxes = {a, a/alpha, a/beta}
    elp13: Ellipsoid | pos = {a1/2, -a1/2, -a1}; semiaxes = {a, a/alpha, a/beta}
    elp14: Ellipsoid | pos = {-a1/2, a1/2, a1}; semiaxes = {a, a/alpha, a/beta}
    elp15: Ellipsoid | pos = {-a1/2, a1/2, -a1}; semiaxes = {a, a/alpha, a/beta}
    elp16: Ellipsoid | pos = {-a1/2, -a1/2, a1}; semiaxes = {a, a/alpha, a/beta}
    elp17: Ellipsoid | pos = {-a1/2, -a1/2, -a1}; semiaxes = {a, a/alpha, a/beta}
    wp1: WorkPlane | unite = on
    pard1: PartitionDomains
      domain = elp5(1) domains 1; elp9(1) domains 1; elp6(1) domains 1; elp3(1) domains 1; elp7(1) domains 1; elp14(1) domains 1; elp12(1) domains 1; elp16(1) domains 1; elp10(1) domains 1; elp13(1) domains 1; elp17(1) domains 1; elp15(1) domains 1; elp2(1) domains 1; elp4(1) domains 1; elp8(1) domains 1; elp11(1) domains 1; elp1(1) domains 1; blk1(1) domains 1
      workplane = wp1
    wp2: WorkPlane | quickplane = yz; unite = on
    pard2: PartitionDomains
      domain = pard1(18) domains 1, 2; pard1(3) domains 1, 2; pard1(2) domains 1, 2; pard1(1) domains 1, 2; pard1(7) domains 1; pard1(8) domains 1; pard1(9) domains 1; pard1(6) domains 1; pard1(4) domains 1, 2; pard1(11) domains 1; pard1(10) domains 1; pard1(12) domains 1; pard1(5) domains 1, 2; pard1(13) domains 1, 2; pard1(14) domains 1, 2; pard1(15) domains 1, 2; pard1(16) domains 1; pard1(17) domains 1, 2
      workplane = wp2
    wp3: WorkPlane | quickplane = zx; unite = on
    wp4: WorkPlane | quickz = a1; unite = on
    pard4: PartitionDomains
      domain = pard2(12) domains 1; pard2(10) domains 1; pard2(17) domains 1; pard2(11) domains 1; pard2(13) domains 1, 2; pard2(9) domains 1, 2; pard2(2) domains 1, 2; pard2(7) domains 1; pard2(8) domains 1; pard2(6) domains 1; pard2(16) domains 1-4; pard2(15) domains 1, 2; pard2(5) domains 1; pard2(3) domains 1-4; pard2(4) domains 1, 2; pard2(14) domains 1, 2; pard2(1) domains 1-4
      workplane = wp4
    wp5: WorkPlane | quickz = -a1; unite = on
    pard5: PartitionDomains
      domain = pard4(1) domains 1; pard4(2) domains 1; pard4(3) domains 1; pard4(4) domains 1; pard4(17) domains 1-4; pard4(5) domains 1, 2; pard4(6) domains 1, 2; pard4(7) domains 1, 2; pard4(11) domains 1-4; pard4(12) domains 1, 2; pard4(8) domains 2; pard4(9) domains 2; pard4(10) domains 2; pard4(13) domains 2; pard4(15) domains 1, 2; pard4(16) domains 1, 2; pard4(14) domains 1-4
      workplane = wp5
    pard3: PartitionDomains
      domain = pard5(8) domains 1, 2; pard5(7) domains 1, 2; pard5(6) domains 1, 2; pard5(5) domains 1-4; pard5(1) domains 1, 2; pard5(2) domains 1, 2; pard5(4) domains 1, 2; pard5(15) domains 1, 2; pard5(17) domains 1-4; pard5(14) domains 1, 2; pard5(12) domains 1, 2; pard5(11) domains 1, 2; pard5(13) domains 1, 2; pard5(9) domains 1-4; pard5(10) domains 1, 2; pard5(3) domains 1, 2; pard5(16) domains 1, 2; pard2(18) domains 1-4
      workplane = wp3
    wp6: WorkPlane | quickplane = yz; quickx = a1; unite = on
    pard6: PartitionDomains
      domain = pard3(6) domains 1; pard3(5) domains 1; pard3(7) domains 1; pard3(16) domains 1; pard3(14) domains 1-4; pard3(15) domains 1, 2; pard3(3) domains 1, 2; pard3(11) domains 2; pard3(12) domains 2; pard3(13) domains 2; pard3(10) domains 2; pard3(2) domains 1-4; pard3(1) domains 1, 2; pard3(4) domains 1-8; pard3(9) domains 1-4; pard3(8) domains 1, 2; pard3(17) domains 1-4
      workplane = wp6
    wp7: WorkPlane | quickplane = yz; quickx = -a1; unite = on
    pard7: PartitionDomains
      domain = pard6(1) domains 1; pard6(2) domains 1; pard6(3) domains 1; pard6(4) domains 1; pard6(5) domains 1-4; pard6(6) domains 1-4; pard6(7) domains 1, 2; pard6(12) domains 1-4; pard6(13) domains 1, 2; pard6(14) domains 1-8; pard6(9) domains 2; pard6(11) domains 2; pard6(8) domains 2; pard6(10) domains 2; pard6(15) domains 1-4; pard6(16) domains 1-4; pard6(17) domains 5-8
      workplane = wp7
    wp8: WorkPlane | quickplane = zx; quicky = a1; unite = on
    pard8: PartitionDomains
      domain = pard7(2) domains 1; pard7(1) domains 1; pard7(3) domains 1; pard7(4) domains 1; pard7(11) domains 2; pard7(5) domains 1-4; pard7(6) domains 1-4; pard7(10) domains 1-8; pard7(7) domains 1-4; pard7(8) domains 1-4; pard7(9) domains 1-4; pard7(13) domains 2; pard7(14) domains 2; pard7(15) domains 1-4; pard7(16) domains 1-4; pard7(12) domains 2; pard7(17) domains 5-8
      workplane = wp8
    wp9: WorkPlane | quickplane = zx; quicky = -a1; unite = on
    pard9: PartitionDomains
      domain = pard8(2) domains 1; pard8(1) domains 1; pard8(4) domains 1; pard8(3) domains 1; pard8(13) domains 2; pard8(12) domains 2; pard8(5) domains 2; pard8(6) domains 3, 4, 7, 8; pard8(9) domains 1-4, 7, 8; pard8(10) domains 1-4; pard8(11) domains 1-4; pard8(8) domains 1-8; pard8(7) domains 3-8; pard8(14) domains 1-4; pard8(15) domains 1-4; pard8(16) domains 2; pard8(17) domains 5-8
      workplane = wp9
    del1: Delete "Delete Entities 1"
      input = pard9(9) domains 1-8; pard9(6) domains 1, 2; pard9(5) domains 1, 2; pard9(10) domains 1-8; pard9(11) domains 1-8; pard9(14) domains 1-8; pard9(15) domains 1-8; pard9(4) domains 1, 2; pard9(1) domains 1, 2; pard9(8) domains 1-5, 7, 8; pard9(17) domains 1-3, 5-8; pard9(13) domains 1, 3-8; pard9(3) domains 1, 2; pard9(2) domains 1, 2; pard9(16) domains 1, 2; pard3(18) domains 1-7; pard9(12) domains 1-7; pard9(7) domains 2
    fin: Finalize "Form Union"

Materials
  mat1: Common "PMN-PT_ABhishek_new 1" on domains 1, 3-6
    def "Basic"
      density = 8157[kg/m^3]
    StrainCharge "Strain-charge form"
      sE = {1.41e-011[1/Pa], -4.76e-012[1/Pa], -6.46e-012[1/Pa], 0[1/Pa], 0[1/Pa], 0[1/Pa], -4.76e-012[1/Pa], 1.41e-011[1/Pa], -6.46e-012[1/Pa], 0[1/Pa], 0[1/Pa], 0[1/Pa], -6.46e-012[1/Pa], -6.46e-012[1/Pa], 1.72e-011[1/Pa], 0[1/Pa], 0[1/Pa], 0[1/Pa], 0[1/Pa], 0[1/Pa], 0[1/Pa], 4.67e-011[1/Pa], 0[1/Pa], 0[1/Pa], 0[1/Pa], 0[1/Pa], 0[1/Pa], 0[1/Pa], 4.67e-011[1/Pa], 0[1/Pa], 0[1/Pa], 0[1/Pa], 0[1/Pa], 0[1/Pa], 0[1/Pa], 3.77e-011[1/Pa]}
      dET = {0[C/N], 0[C/N], -395e-012[C/N], 0[C/N], 0[C/N], -395e-012[C/N], 0[C/N], 0[C/N], 800e-012[C/N], 0[C/N], 1090e-012[C/N], 0[C/N], 1090e-012[C/N], 0[C/N], 0[C/N], 0[C/N], 0[C/N], 0[C/N]}
      epsilonrT = diag{5660, 5660, 6990}
      eta_sE = {0, 0, 0, 0, 0, 0, 0, 0, 0, 0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}
      eta_dET = {0, 0, 0, 0, 0, 0, 0, 0, 0, 0, 0, 0, 0, 0, 0, 0, 0, 0}
      eta_epsilonT = 0
    StressCharge "Stress-charge form"
      cE = {13.8e+010[Pa], 8.50e+010[Pa], 8.40+010[Pa], 0[Pa], 0[Pa], 0[Pa], 8.50e+010[Pa], 13.8e+010[Pa], 8.40e+010[Pa], 0[Pa], 0[Pa], 0[Pa], 8.40e+010[Pa], 8.40e+010[Pa], 12.2e+010[Pa], 0[Pa], 0[Pa], 0[Pa], 0[Pa], 0[Pa], 0[Pa], 2.14e+010[Pa], 0[Pa], 0[Pa], 0[Pa], 0[Pa], 0[Pa], 0[Pa], 2.14e+010[Pa], 0[Pa], 0[Pa], 0[Pa], 0[Pa], 0[Pa], 0[Pa], 2.65e+010[Pa]}
      eES = {0[C/m^2], 0[C/m^2], -20.8[C/m^2], 0[C/m^2], 0[C/m^2], -20.8[C/m^2], 0[C/m^2], 0[C/m^2], 30.9[C/m^2], 0[C/m^2], 23.2[C/m^2], 0[C/m^2], 23.2[C/m^2], 0[C/m^2], 0[C/m^2], 0[C/m^2], 0[C/m^2], 0[C/m^2]}
      epsilonrS = diag{2810, 2810, 2330}
      eta_cE = {0, 0, 0, 0, 0, 0, 0, 0, 0, 0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}
      eta_eES = {0, 0, 0, 0, 0, 0, 0, 0, 0, 0, 0, 0, 0, 0, 0, 0, 0, 0}
      eta_epsilonS = 0
  mat2: Common "PDMS_Abhishek" on domains 2
    def "Basic"
      thermalexpansioncoefficient = 9e-4[1/K]
      heatcapacity = 1460[J/(kg*K)]
      relpermittivity = 2.75
      density = 970[kg/m^3]
      thermalconductivity = 0.16[W/(m*K)]
    StressCharge "Stress-charge form"
      cE = {2.45e+06[Pa], 816000[Pa], 816000[Pa], 0, 0, 0, 816000[Pa], 2.45e+06[Pa], 816000[Pa], 0, 0, 0, 816000[Pa], 816000[Pa], 2.45e+06[Pa], 0, 0, 0, 0, 0, 0, 1.63e+06[Pa], 0, 0, 0, 0, 0, 0, 1.63e+06[Pa], 0, 0, 0, 0, 0, 0, 1.63e+06[Pa]}
      eES = {0, 0, 0, 0, 0, 0, 0, 0, 0, 0, 0, 0, 0, 0, 0, 0, 0, 0}
      epsilonrS = 2.4
      eta_cE = {0, 0, 0, 0, 0, 0, 0, 0, 0, 0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}
      eta_eES = {0, 0, 0, 0, 0, 0, 0, 0, 0, 0, 0, 0, 0, 0, 0, 0, 0, 0}
      eta_epsilonS = 0

Physics
  solid: SolidMechanics on all domains
    dependent variable u = {u, v, w}
    lemm1: LinearElasticModel "Linear Elastic Material 1" (default)
    free1: Free (default)
    init1: init "Initial Values 1" (default)
    pzm1: PiezoelectricMaterialModel "Piezoelectric Material 1" on all domains
    disp1: Displacement2 "Prescribed Displacement 1" on boundaries 1, 4, 9 | Direction = {1, 0, 0}
    disp2: Displacement2 "Prescribed Displacement 2" on boundaries 25-27 | Direction = {1, 0, 0}; U0 = {0, 0, 0}
    disp3: Displacement2 "Prescribed Displacement 3" on boundaries 2, 5, 19 | Direction = {0, 1, 0}
    disp4: Displacement2 "Prescribed Displacement 4" on boundaries 12, 13, 24 | Direction = {0, 1, 0}; U0 = {2*y*e0, 0, 0}
    disp5: Displacement2 "Prescribed Displacement 5" on boundaries 3, 8, 10, 20, 22 | Direction = {0, 0, 1}
    disp6: Displacement2 "Prescribed Displacement 6" on boundaries 7, 15 | Direction = {0, 0, 1}; U0 = {0, 0, 0}
  es: Electrostatics on all domains
    dependent variable V
    ccn1: ChargeConservation (default)
    zc1: ZeroCharge (default)
    init1: init "Initial Values 1" (default)
    ccnp1: ChargeConservationPiezo "Charge Conservation, Piezoelectric 1" on all domains
    pot1: ElectricPotential on boundaries 25-27 | V0 = 1
    gnd1: Ground on boundaries 1, 4, 9

Multiphysics
  pze1: PiezoelectricEffect on all domains | Solid_physics = solid; Electrostatics_physics = es

Mesh
  mesh1 "Mesh 1"
    size: MeshSizeDefault | hmax = 6.0E-9; hmin = 1.08E-9; hcurve = 0.6; hnarrow = 0.5; hgrad = 1.5
    ftet1: FreeTet "Free Tetrahedral 1" on remaining entities | method = dellegacy52

Studies
  std1 "Study 1"
    param: Parametric "Parametric Sweep"
      pname = vf
      plistarr = 0.01 0.05 0.1 0.15 0.2 0.25 0.3 0.35 0.4 0.45 0.5 0.55 0.6 0.65
    stat: Stationary

Solver configurations
  sol1 "Solution 1" (study std1)
    v1: Variables "Dependent Variables 1"
    s1: Stationary "Stationary Solver 1"
      dDef: Direct
      fc1: FullyCoupled | linsolver = dDef
  sol2 "Parametric Solutions 1" (study std1)

Datasets
  dset1: Solution | solution = sol1
  dset2: Solution | solution = sol2

Derived values
  int4: IntVolume "stress 13" on all domains | data = dset2; table = tbl26; expr = solid.sxz/vol
  int5: IntVolume "E 1" on all domains | data = dset2; table = tbl27; expr = es.Ex/vol
  int6: IntVolume "D 1" on all domains | data = dset2; table = tbl28; expr = es.Dx/vol

Tables
  tbl1: Table
    // stress 11 (solid.sx/vol)
    vf | solid.sx/vol (N/m^2)
    0.01 | 218.681
    0.05 | 172.905
    0.1 | 106.58
    0.15 | 322.715
    0.2 | -146.321
    0.25 | 51.358
    0.3 | -73.9363
    0.35 | 347.593
    0.4 | -77.1799
    0.45 | 1065.68
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  tbl2: Table
    // strain 11 (solid.eXX/vol)
    vf | solid.eXX/vol (1)
    0.01 | 0.0001
    0.05 | 0.0001
    0.1 | 0.0001
    0.15 | 0.0001
    0.2 | 0.0001
    0.25 | 0.0001
    0.3 | 0.0001
    0.35 | 0.0001
    0.4 | 0.0001
    0.45 | 0.0001
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  tbl3: Table
    // stress 22 (solid.sy/vol)
    vf | solid.sy/vol (N/m^2)
    0.01 | 803.921
    0.05 | 874.643
    0.1 | 894.804
    0.15 | 723.256
    0.2 | 808.691
    0.25 | 992.014
    0.3 | 1174.54
    0.35 | 1126.23
    0.4 | 1200.19
    0.45 | 728.864
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  tbl4: Table
    // stress 11 (solid.sx/vol)
    vf | solid.sx/vol (N/m^2)
    0.01 | 250.01
    0.05 | 270.756
    0.1 | 298.839
    0.15 | 330.076
    0.2 | 365.404
    0.25 | 405.953
    0.3 | 453.148
    0.35 | 508.834
    0.4 | 575.631
    0.45 | 657.306
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  tbl5: Table
    // strain 11 (solid.eXX/vol)
    vf | solid.eXX/vol (1)
    0.01 | 0.0001
    0.05 | 0.0001
    0.1 | 0.0001
    0.15 | 0.0001
    0.2 | 0.0001
    0.25 | 0.0001
    0.3 | 0.0001
    0.35 | 0.0001
    0.4 | 0.0001
    0.45 | 0.0001
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  tbl6: Table
    // stress 11 (solid.sx/vol)
    vf | solid.sx/vol (N/m^2)
    0.01 | 249.937
    0.05 | 270.358
    0.1 | 297.978
    0.15 | 328.657
    0.2 | 363.293
    0.25 | 402.954
    0.3 | 448.992
    0.35 | 503.182
    0.4 | 567.98
    0.45 | 647.05
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  tbl7: Table
    // strain 11 (solid.eXX/vol)
    vf | solid.eXX/vol (1)
    0.01 | 0.0001
    0.05 | 0.0001
    0.1 | 0.0001
    0.15 | 0.0001
    0.2 | 0.0001
    0.25 | 0.0001
    0.3 | 0.0001
    0.35 | 0.0001
    0.4 | 0.0001
    0.45 | 0.0001
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  tbl8: Table
    // stress 22 (solid.sy/vol)
    vf | solid.sy/vol (N/m^2)
    0.01 | 83.1935
    0.05 | 89.6298
    0.1 | 98
    0.15 | 106.988
    0.2 | 116.811
    0.25 | 127.687
    0.3 | 139.891
    0.35 | 153.817
    0.4 | 170.079
    0.45 | 189.676
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  tbl9: Table
    // stress 33 (solid.sz/vol)
    vf | solid.sz/vol (N/m^2)
    0.01 | 253.139
    0.05 | 289.068
    0.1 | 341.075
    0.15 | 400.959
    0.2 | 469.618
    0.25 | 548.793
    0.3 | 641.105
    0.35 | 750.402
    0.4 | 882.351
    0.45 | 1045.85
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  tbl10: Table
    // strain 33 (solid.eZZ/vol)
    vf | solid.eZZ/vol (1)
    0.01 | 0.0001
    0.05 | 0.0001
    0.1 | 0.0001
    0.15 | 0.0001
    0.2 | 0.0001
    0.25 | 0.0001
    0.3 | 0.0001
    0.35 | 0.0001
    0.4 | 0.0001
    0.45 | 0.0001
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  tbl11: Table
    // stress 11 (solid.sx/vol)
    vf | solid.sx/vol (N/m^2)
    0.01 | 83.381
    0.05 | 91.0137
    0.1 | 102.004
    0.15 | 114.948
    0.2 | 130.169
    0.25 | 148.04
    0.3 | 169.061
    0.35 | 193.92
    0.4 | 223.642
    0.45 | 259.809
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  tbl12: Table
    // stress 23 (solid.syz/vol)
    vf | solid.syz/vol (N/m^2)
    0.01 | 332.221
    0.05 | 358.454
    0.1 | 395.118
    0.15 | 437.103
    0.2 | 485.654
    0.25 | 542.301
    0.3 | 609.025
    0.35 | 688.499
    0.4 | 784.542
    0.45 | 902.983
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  tbl13: Table
    // strain 23 (2*solid.eYZ/vol)
    vf | 2*solid.eYZ/vol (1)
    0.01 | 0.0002
    0.05 | 0.0002
    0.1 | 0.0002
    0.15 | 0.0002
    0.2 | 0.0002
    0.25 | 0.0002
    0.3 | 0.0002
    0.35 | 0.0002
    0.4 | 0.0002
    0.45 | 0.0002
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  tbl14: Table
    // stress 13 (solid.sxz/vol)
    vf | solid.sxz/vol (N/m^2)
    0.01 | 332.22
    0.05 | 358.455
    0.1 | 395.119
    0.15 | 437.102
    0.2 | 485.656
    0.25 | 542.304
    0.3 | 609.026
    0.35 | 688.5
    0.4 | 784.543
    0.45 | 902.986
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  tbl15: Table
    // strain 13 (2*solid.eXZ/vol)
    vf | 2*solid.eXZ/vol (1)
    0.01 | 0.0002
    0.05 | 0.0002
    0.1 | 0.0002
    0.15 | 0.0002
    0.2 | 0.0002
    0.25 | 0.0002
    0.3 | 0.0002
    0.35 | 0.0002
    0.4 | 0.0002
    0.45 | 0.0002
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  tbl16: Table
    // stress 12 (solid.sxy/vol)
    vf | solid.sxy/vol (N/m^2)
    0.01 | 331.121
    0.05 | 352.434
    0.1 | 381.25
    0.15 | 412.921
    0.2 | 448.147
    0.25 | 487.915
    0.3 | 533.627
    0.35 | 587.299
    0.4 | 651.862
    0.45 | 731.839
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  tbl17: Table
    // strain 12 (2*solid.eXY/vol)
    vf | 2*solid.eXY/vol (1)
    0.01 | 0.0002
    0.05 | 0.0002
    0.1 | 0.0002
    0.15 | 0.0002
    0.2 | 0.0002
    0.25 | 0.0002
    0.3 | 0.0002
    0.35 | 0.0002
    0.4 | 0.0002
    0.45 | 0.0002
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  tbl18: Table
    // stress 11 (solid.sx/vol)
    vf | solid.sx/vol (N/m^2)
    0.01 | -0.198634
    0.05 | -0.989674
    0.1 | -2.05964
    0.15 | -3.31987
    0.2 | -4.88399
    0.25 | -6.88742
    0.3 | -9.50231
    0.35 | -12.9749
    0.4 | -17.6685
    0.45 | -24.1767
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  tbl19: Table
    // stress 22 (solid.sy/vol)
    vf | solid.sy/vol (N/m^2)
    0.01 | -0.198354
    0.05 | -0.989457
    0.1 | -2.05961
    0.15 | -3.31916
    0.2 | -4.88349
    0.25 | -6.88781
    0.3 | -9.50293
    0.35 | -12.9748
    0.4 | -17.6681
    0.45 | -24.1739
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  tbl20: Table
    // stress 33 (solid.sz/vol)
    vf | solid.sz/vol (N/m^2)
    0.01 | 0.875991
    0.05 | 4.85274
    0.1 | 11.2543
    0.15 | 19.8451
    0.2 | 31.5053
    0.25 | 47.4686
    0.3 | 69.5027
    0.35 | 100.341
    0.4 | 144.433
    0.45 | 209.678
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  tbl21: Table
    // E3 (es.Ez/vol)
    vf | es.Ez/vol (V/m)
    0.01 | -1.66667e+07
    0.05 | -1.66667e+07
    0.1 | -1.66667e+07
    0.15 | -1.66667e+07
    0.2 | -1.66667e+07
    0.25 | -1.66667e+07
    0.3 | -1.66667e+07
    0.35 | -1.66667e+07
    0.4 | -1.66667e+07
    0.45 | -1.66667e+07
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  tbl22: Table
    // D 3 (es.Dz/vol)
    vf | es.Dz/vol (C/m^2)
    0.01 | -0.000153769
    0.05 | -0.000197211
    0.1 | -0.000258124
    0.15 | -0.000331198
    0.2 | -0.000420894
    0.25 | -0.000531511
    0.3 | -0.000667646
    0.35 | -0.000835259
    0.4 | -0.00104293
    0.45 | -0.00130457
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  tbl23: Table
    // stress 23 (solid.syz/vol)
    vf | solid.syz/vol (N/m^2)
    0.01 | 696.475
    0.05 | 3553.75
    0.1 | 7492.15
    0.15 | 11880.5
    0.2 | 16797.1
    0.25 | 22254.1
    0.3 | 28540.6
    0.35 | 35741.8
    0.4 | 44201.5
    0.45 | 54364
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  tbl24: Table
    // E2 (es.Ey/vol)
    vf | es.Ey/vol (V/m)
    0.01 | -1.66667e+07
    0.05 | -1.66667e+07
    0.1 | -1.66667e+07
    0.15 | -1.66667e+07
    0.2 | -1.66667e+07
    0.25 | -1.66667e+07
    0.3 | -1.66667e+07
    0.35 | -1.66667e+07
    0.4 | -1.66667e+07
    0.45 | -1.66667e+07
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  tbl25: Table
    // D2 (es.Dy/vol)
    vf | es.Dy/vol (C/m^2)
    0.01 | -0.000362452
    0.05 | -0.000397465
    0.1 | -0.000445503
    0.15 | -0.000498717
    0.2 | -0.00055797
    0.25 | -0.000624556
    0.3 | -0.000700298
    0.35 | -0.000787791
    0.4 | -0.00089076
    0.45 | -0.00101483
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  tbl26: Table
    // stress 13 (solid.sxz/vol)
    vf | solid.sxz/vol (N/m^2)
    0.01 | 770.739
    0.05 | 3910.52
    0.1 | 8168.42
    0.15 | 12925.5
    0.2 | 18209.3
    0.25 | 24130.8
    0.3 | 30933.4
    0.35 | 38741.6
    0.4 | 47881.1
    0.45 | 58945.3
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  tbl27: Table
    // E 1 (es.Ex/vol)
    vf | es.Ex/vol (V/m)
    0.01 | -1.66667e+07
    0.05 | -1.66667e+07
    0.1 | -1.66667e+07
    0.15 | -1.66667e+07
    0.2 | -1.66667e+07
    0.25 | -1.66667e+07
    0.3 | -1.66667e+07
    0.35 | -1.66667e+07
    0.4 | -1.66667e+07
    0.45 | -1.66667e+07
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  tbl28: Table
    // D 1 (es.Dx/vol)
    vf | es.Dx/vol (C/m^2)
    0.01 | -0.00036333
    0.05 | -0.000401726
    0.1 | -0.000454169
    0.15 | -0.000512334
    0.2 | -0.000577343
    0.25 | -0.00065069
    0.3 | -0.000734417
    0.35 | -0.00083136
    0.4 | -0.000945631
    0.45 | -0.00108348
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
Plots
  pg1: PlotGroup3D "Stress (solid)" | data = dset2
    surf1: Surface | expr = solid.mises
      def: Deform "Deformation" | expr = {u, v, w}; descr = Displacement field (Material)
  pg2: PlotGroup3D "Electric Potential (es)" | data = dset2
    mslc1: Multislice | expr = V; constUnit = {m, m, m}
  pg3: PlotGroup3D "Stress (solid) 1" | data = dset1
    surf1: Surface | expr = solid.mises
      def: Deform "Deformation" | expr = {u, v, w}; descr = Displacement field (Material)
  pg4: PlotGroup3D "Electric Potential (es) 1" | data = dset1
    mslc1: Multislice | expr = V; constUnit = {m, m, m}