// COMSOL Multiphysics 6.1.0.282 model "C33_C13_PVDF_PZT_random_orientation_vf_0.11_newversion.mph"
// Outline of the model tree

Parameters
  V = 50*50*50[nm^3]  // volume of the cube
  Vf = 0.11  // volume fraction
  r = ((Vf*V*3)/(5*4*pi))^(1/3)  // radius of the sphere

Variables
  var1 "Variables 1"
    e0 = 1e-4

Coordinate systems
  sys2: Rotated "Rotated System 2" | angle = {30.1057, 49.6565, 91.8350}
  sys3: Rotated "Rotated System 3" | angle = {62.1122, 173.8336, 133.0956}
  sys4: Rotated "Rotated System 4" | angle = {174.0034, 129.7176, 10.6404}
  sys5: Rotated "Rotated System 5" | angle = {129.9589, 77.1465, 23.2101}
  sys6: Rotated "Rotated System 6" | angle = {61.1974, 74.8199, 131.1034}

Geometry
  geom1 "Geometry 1" (3D, length unit nm)
    blk1: Block | size = {50, 50, 50}
    sph1: Sphere | pos = {22.723537, 14.719485, 38.206219}; r = r
    sph2: Sphere | pos = {40.64821, 23.006089, 12.315668}; r = r
    sph3: Sphere | pos = {15.924064, 12.521107, 18.368068}; r = r
    sph4: Sphere | pos = {9.644326, 38.988165, 32.512825}; r = r
    sph5: Sphere | pos = {20.67611, 40.91677, 9.922181}; r = r
    fin: Finalize "Form Union"

Materials
  mat1: Common "Lead Zirconate Titanate (PZT-2)" on domains 2-6
    def "Basic"
      relpermittivity = diag{504.1, 504.1, 270}
      density = 7600[kg/m^3]
    StrainCharge "Strain-charge form"
      sE = {1.16e-011[1/Pa], -3.33e-012[1/Pa], -4.97e-012[1/Pa], 0[1/Pa], 0[1/Pa], 0[1/Pa], -3.33e-012[1/Pa], 1.16e-011[1/Pa], -4.97e-012[1/Pa], 0[1/Pa], 0[1/Pa], 0[1/Pa], -4.97e-012[1/Pa], -4.97e-012[1/Pa], 1.48e-011[1/Pa], 0[1/Pa], 0[1/Pa], 0[1/Pa], 0[1/Pa], 0[1/Pa], 0[1/Pa], 4.5e-011[1/Pa], 0[1/Pa], 0[1/Pa], 0[1/Pa], 0[1/Pa], 0[1/Pa], 0[1/Pa], 4.5e-011[1/Pa], 0[1/Pa], 0[1/Pa], 0[1/Pa], 0[1/Pa], 0[1/Pa], 0[1/Pa], 2.99e-011[1/Pa]}
      dET = {0[C/N], 0[C/N], -6e-011[C/N], 0[C/N], 0[C/N], -6e-011[C/N], 0[C/N], 0[C/N], 1.52e-010[C/N], 0[C/N], 4.4e-010[C/N], 0[C/N], 4.4e-010[C/N], 0[C/N], 0[C/N], 0[C/N], 0[C/N], 0[C/N]}
      epsilonrT = diag{990, 990, 450}
      eta_sE = {0, 0, 0, 0, 0, 0, 0, 0, 0, 0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}
      eta_dET = {0, 0, 0, 0, 0, 0, 0, 0, 0, 0, 0, 0, 0, 0, 0, 0, 0, 0}
      eta_epsilonT = 0
    StressCharge "Stress-charge form"
      cE = {1.34868e+011[Pa], 6.78883e+010[Pa], 6.80876e+010[Pa], 0[Pa], 0[Pa], 0[Pa], 6.78883e+010[Pa], 1.34868e+011[Pa], 6.80876e+010[Pa], 0[Pa], 0[Pa], 0[Pa], 6.80876e+010[Pa], 6.80876e+010[Pa], 1.13297e+011[Pa], 0[Pa], 0[Pa], 0[Pa], 0[Pa], 0[Pa], 0[Pa], 2.22222e+010[Pa], 0[Pa], 0[Pa], 0[Pa], 0[Pa], 0[Pa], 0[Pa], 2.22222e+010[Pa], 0[Pa], 0[Pa], 0[Pa], 0[Pa], 0[Pa], 0[Pa], 3.34448e+010[Pa]}
      eES = {0[C/m^2], 0[C/m^2], -1.81603[C/m^2], 0[C/m^2], 0[C/m^2], -1.81603[C/m^2], 0[C/m^2], 0[C/m^2], 9.05058[C/m^2], 0[C/m^2], 9.77778[C/m^2], 0[C/m^2], 9.77778[C/m^2], 0[C/m^2], 0[C/m^2], 0[C/m^2], 0[C/m^2], 0[C/m^2]}
      epsilonrS = diag{504.1, 504.1, 270}
      eta_cE = {0, 0, 0, 0, 0, 0, 0, 0, 0, 0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}
      eta_eES = {0, 0, 0, 0, 0, 0, 0, 0, 0, 0, 0, 0, 0, 0, 0, 0, 0, 0}
      eta_epsilonS = 0
    AnisotropicVoGrp "Anisotropic, Voigt notation"
      DVo = {1.34868e+011[Pa], 6.78883e+010[Pa], 6.80876e+010[Pa], 0[Pa], 0[Pa], 0[Pa], 6.78883e+010[Pa], 1.34868e+011[Pa], 6.80876e+010[Pa], 0[Pa], 0[Pa], 0[Pa], 6.80876e+010[Pa], 6.80876e+010[Pa], 1.13297e+011[Pa], 0[Pa], 0[Pa], 0[Pa], 0[Pa], 0[Pa], 0[Pa], 2.22222e+010[Pa], 0[Pa], 0[Pa], 0[Pa], 0[Pa], 0[Pa], 0[Pa], 2.22222e+010[Pa], 0[Pa], 0[Pa], 0[Pa], 0[Pa], 0[Pa], 0[Pa], 3.34448e+010[Pa]}
      eta_DVo = {0, 0, 0, 0, 0, 0, 0, 0, 0, 0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}
  mat2: Common "Polyvinylidene fluoride (PVDF)" on domains 1
    def "Basic"
      relpermittivity = diag{6.8, 8.4, 7.3}
      density = 1780[kg/m^3]
    StrainCharge "Strain-charge form"
      sE = {4.43e-010[1/Pa], -9.91e-011[1/Pa], -3.10e-010[1/Pa], 0[1/Pa], 0[1/Pa], 0[1/Pa], -9.91e-011[1/Pa], 5.04e-10[1/Pa], -3.19e-010[1/Pa], 0[1/Pa], 0[1/Pa], 0[1/Pa], -3.10e-010[1/Pa], -3.19e-010[1/Pa], 1.14e-9[1/Pa], 0[1/Pa], 0[1/Pa], 0[1/Pa], 0[1/Pa], 0[1/Pa], 0[1/Pa], 1.82e-09[1/Pa], 0[1/Pa], 0[1/Pa], 0[1/Pa], 0[1/Pa], 0[1/Pa], 0[1/Pa], 1.70e-09[1/Pa], 0[1/Pa], 0[1/Pa], 0[1/Pa], 0[1/Pa], 0[1/Pa], 0[1/Pa], 1.45e-09[1/Pa]}
      dET = {0[C/N], 0[C/N], 1.36e-011[C/N], 0[C/N], 0[C/N], 1.94e-011[C/N], 0[C/N], 0[C/N], 2.97e-011[C/N], 0[C/N], 2.01e-011[C/N], 0[C/N], 1.93e-011[C/N], 0[C/N], 0[C/N], 0[C/N], 0[C/N], 0[C/N]}
      epsilonrT = diag{6.8, 8.4, 7.3}
      eta_sE = {0, 0, 0, 0, 0, 0, 0, 0, 0, 0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}
      eta_dET = {0, 0, 0, 0, 0, 0, 0, 0, 0, 0, 0, 0, 0, 0, 0, 0, 0, 0}
      eta_epsilonT = 0
    StressCharge "Stress-charge form"
      cE = {3.61e+09[Pa], 1.61e+09[Pa], 1.42e+09[Pa], 0[Pa], 0[Pa], 0[Pa], 1.61e+09[Pa], 3.13e+09[Pa], 1.31e+09[Pa], 0[Pa], 0[Pa], 0[Pa], 1.42e+09[Pa], 1.31e+09[Pa], 1.62e+09[Pa], 0[Pa], 0[Pa], 0[Pa], 0[Pa], 0[Pa], 0[Pa], 5.48e+08[Pa], 0[Pa], 0[Pa], 0[Pa], 0[Pa], 0[Pa], 0[Pa], 5.87e+08[Pa], 0[Pa], 0[Pa], 0[Pa], 0[Pa], 0[Pa], 0[Pa], 6.9e+08[Pa]}
      eES = {0[C/m^2], 0[C/m^2], 0.0098[C/m^2], 0[C/m^2], 0[C/m^2], -0.0109[C/m^2], 0[C/m^2], 0[C/m^2], -0.0263[C/m^2], 0[C/m^2], 0.0110[C/m^2], 0[C/m^2], -0.0113[C/m^2], 0[C/m^2], 0[C/m^2], 0[C/m^2], 0[C/m^2], 0[C/m^2]}
      epsilonrS = diag{6.76, 8.38, 7.20}
      eta_cE = {0, 0, 0, 0, 0, 0, 0, 0, 0, 0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}
      eta_eES = {0, 0, 0, 0, 0, 0, 0, 0, 0, 0, 0, 0, 0, 0, 0, 0, 0, 0}
      eta_epsilonS = 0
    AnisotropicVoGrp "Anisotropic, Voigt notation"
      DVo = {3.61e+09[Pa], 1.61e+09[Pa], 1.42e+09[Pa], 0[Pa], 0[Pa], 0[Pa], 1.61e+09[Pa], 3.13e+09[Pa], 1.31e+09[Pa], 0[Pa], 0[Pa], 0[Pa], 1.42e+09[Pa], 1.31e+09[Pa], 1.62e+09[Pa], 0[Pa], 0[Pa], 0[Pa], 0[Pa], 0[Pa], 0[Pa], 5.48e+08[Pa], 0[Pa], 0[Pa], 0[Pa], 0[Pa], 0[Pa], 0[Pa], 5.87e+08[Pa], 0[Pa], 0[Pa], 0[Pa], 0[Pa], 0[Pa], 0[Pa], 6.9e+08[Pa]}
      eta_DVo = {0, 0, 0, 0, 0, 0, 0, 0, 0, 0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}

Physics
  solid: SolidMechanics on all domains
    dependent variable u = {u, v, w}
    lemm1: LinearElasticModel "Linear Elastic Material 1" (default) | SolidModel = Anisotropic
    free1: Free (default)
    init1: init "Initial Values 1" (default)
    lemm2: LinearElasticModel "Linear Elastic Material 2" on domains 1
      SolidModel = Anisotropic
      AnisotropicOption = AnisotropicVo
    lemm3: LinearElasticModel "Linear Elastic Material 3" on domains 3
      SolidModel = Anisotropic
      AnisotropicOption = AnisotropicVo
      coordinateSystem = sys2
    lemm4: LinearElasticModel "Linear Elastic Material 4" on domains 4
      SolidModel = Anisotropic
      AnisotropicOption = AnisotropicVo
      coordinateSystem = sys3
    lemm5: LinearElasticModel "Linear Elastic Material 5" on domains 6
      SolidModel = Anisotropic
      AnisotropicOption = AnisotropicVo
      coordinateSystem = sys4
    lemm6: LinearElasticModel "Linear Elastic Material 6" on domains 2
      SolidModel = Anisotropic
      AnisotropicOption = AnisotropicVo
      coordinateSystem = sys5
    lemm7: LinearElasticModel "Linear Elastic Material 7" on domains 5
      SolidModel = Anisotropic
      AnisotropicOption = AnisotropicVo
      coordinateSystem = sys6
    disp1: Displacement2 "Prescribed Displacement 1" on boundaries 1 | Direction = {1, 0, 0}
    disp2: Displacement2 "Prescribed Displacement 2" on boundaries 2 | Direction = {0, 1, 0}
    disp3: Displacement2 "Prescribed Displacement 3" on boundaries 3 | Direction = {0, 0, 1}
    disp4: Displacement2 "Prescribed Displacement 4" on boundaries 46 | Direction = {1, 0, 0}; U0 = {0, 0, 0}
    disp5: Displacement2 "Prescribed Displacement 5" on boundaries 5 | Direction = {0, 1, 0}
    disp6: Displacement2 "Prescribed Displacement 6" on boundaries 4 | Direction = {0, 0, 1}; U0 = {0, 0, z*e0}

Mesh
  mesh1 "Mesh 1" (physics-controlled)

Studies
  std1 "Study 1"
    stat: Stationary

Solver configurations
  sol1 "Solution 1" (study std1)
    v1: Variables "Dependent Variables 1"
    s1: Stationary "Stationary Solver 1"
      dDef: Direct
      fc1: FullyCoupled | linsolver = dDef

Datasets
  dset1: Solution | solution = sol1

Derived values
  int3: IntVolume "Stress_33" on all domains | data = dset1; table = tbl3; expr = solid.sz/V
  int1: IntVolume "Stress_11" on all domains | data = dset1; table = tbl4; expr = solid.sx/V; unit = N/m^2
  int2: IntVolume "Strain_33" on all domains | data = dset1; table = tbl2; expr = solid.eZZ/V

Tables
  tbl1: Table
    // Volume Integration 1 (solid.sx/V)
    solid.sx/V (N*m) | solid.sx/V (N*m) | solid.sx/V (N*m) | solid.sx/V (N*m)
    512387 | 512387 | 512387 | 512387
  tbl2: Table
    // Volume Integration 2 (solid.eXX/V)
    solid.eZZ/V (1)
    0.0001
  tbl3: Table
    // Stress_22 (solid.sy/V)
    solid.sz/V (N/m^2)
    201011
  tbl4: Table
    // Volume Integration 1 (solid.sx/V)
    solid.sx/V (N/m^2)
    161071

Plots
  pg1: PlotGroup3D "Stress (solid)" | data = dset1
    surf1: Surface | expr = solid.mises
      def: Deform "Deformation" | expr = {u, v, w}; descr = Displacement field (Material)