// COMSOL Multiphysics 5.6.0.401 model "Single_Particle_Ellipsoidal_AR_1.3_e31_e32_e33_k33_ESO_PANI_75nm_BTO_composite.mph"
// Outline of the model tree

Parameters
  a = 50[nm]
  e0 = 1e-4
  volfrac = 0.18
  alpha = 1.3
  r_H = ((volfrac*a*a*a*24)/(pi*alpha*4))^(1/3)
  H = alpha*r_H
  t = 7.5

Variables
  var1 "Variables 1"
    E_m = 34e6  // Elastic modulus of ESO
    nu_m = 0.4  // Poisson's ratio of ESO
    C22_m = C11_m
    C33_m = C11_m
    C11_m = (E_m*(1-nu_m))/((1+nu_m)*(1-(2*nu_m)))
    C12_m = (E_m*nu_m)/((1+nu_m)*(1-(2*nu_m)))
    C13_m = C12_m
    C23_m = C12_m
    C44_m = (C11_m-C12_m)/2
    C55_m = (C11_m-C12_m)/2
    C66_m = (C11_m-C12_m)/2

Geometry
  geom1 "Geometry 1" (3D, length unit nm)
    blk1: Block "ESO Matrix" | size = {a, a, a}
    elp1: Ellipsoid "BTO" | semiaxes = {r_H, r_H, H}
    wp1: WorkPlane | unite = on
    wp2: WorkPlane | quickplane = yz; unite = on
    wp3: WorkPlane | quickplane = zx; unite = on
    par1: Partition "Partition Objects 1" | input = elp1; partitionwith = workplane; workplane = wp1
    par2: Partition "Partition Objects 2" | input = par1; partitionwith = workplane; workplane = wp2
    par3: Partition "Partition Objects 3" | input = par2; partitionwith = workplane; workplane = wp3
    del1: Delete "Delete Entities 1" | input = par3(1) domains 1-7
    elp2: Ellipsoid "PANI" | semiaxes = {r_H+t, r_H+t, H+t}
    wp4: WorkPlane | unite = on
    wp5: WorkPlane | quickplane = yz; unite = on
    wp6: WorkPlane | quickplane = zx; unite = on
    par4: Partition "Partition Objects 4" | input = elp2; partitionwith = workplane; workplane = wp1
    par5: Partition "Partition Objects 5" | input = par4; partitionwith = workplane; workplane = wp2
    par6: Partition "Partition Objects 6" | input = par5; partitionwith = workplane; workplane = wp3
    del2: Delete "Delete Entities 2" | input = par6(1) domains 1-7
    fin: Finalize "Form Union"

Materials
  mat2: Common "ESO" on domains 3
    def "Basic"
      density = 1010
    StressCharge "Stress-charge form"
      cE = {72.857e+6[Pa], 48.5714e+6[Pa], 48.5714e+6[Pa], 0[Pa], 0, 0, 48.5714e+6[Pa], 72.857e+6[Pa], 48.5714e+6[Pa], 0[Pa], 0, 0, 48.5714e+6[Pa], 48.5714e+6[Pa], 72.857e+6[Pa], 0[Pa], 0, 0, 0[Pa], 0[Pa], 0[Pa], 12.1428e+6[Pa], 0, 0, 0, 0, 0, 0, 12.1428e+6[Pa], 0, 0, 0, 0, 0, 0, 12.1428e+6[Pa]}
      eES = {0, 0, 0, 0, 0, 0, 0, 0, 0, 0, 0, 0, 0, 0, 0, 0, 0, 0}
      epsilonrS = 3.38
      eta_cE = {0, 0, 0, 0, 0, 0, 0, 0, 0, 0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}
      eta_eES = {0, 0, 0, 0, 0, 0, 0, 0, 0, 0, 0, 0, 0, 0, 0, 0, 0, 0}
      eta_epsilonS = 0
  mat3: Common "Barium Titanate" on domains 1
    def "Basic"
      relpermittivity = diag{1976.8, 1976.8, 111.7}
      density = 6020[kg/m^3]
    StrainCharge "Strain-charge form"
      sE = {8.05e-012[1/Pa], -2.35e-012[1/Pa], -5.24e-012[1/Pa], 0[1/Pa], 0[1/Pa], 0[1/Pa], -2.35e-012[1/Pa], 8.05e-012[1/Pa], -5.24e-012[1/Pa], 0[1/Pa], 0[1/Pa], 0[1/Pa], -5.24e-012[1/Pa], -5.24e-012[1/Pa], 1.57e-011[1/Pa], 0[1/Pa], 0[1/Pa], 0[1/Pa], 0[1/Pa], 0[1/Pa], 0[1/Pa], 1.84e-011[1/Pa], 0[1/Pa], 0[1/Pa], 0[1/Pa], 0[1/Pa], 0[1/Pa], 0[1/Pa], 1.84e-011[1/Pa], 0[1/Pa], 0[1/Pa], 0[1/Pa], 0[1/Pa], 0[1/Pa], 0[1/Pa], 8.84e-012[1/Pa]}
      dET = {0[C/N], 0[C/N], -3.45e-011[C/N], 0[C/N], 0[C/N], -3.45e-011[C/N], 0[C/N], 0[C/N], 8.56e-011[C/N], 0[C/N], 3.92e-010[C/N], 0[C/N], 3.92e-010[C/N], 0[C/N], 0[C/N], 0[C/N], 0[C/N], 0[C/N]}
      epsilonrT = diag{2920, 2920, 168}
      eta_sE = {0, 0, 0, 0, 0, 0, 0, 0, 0, 0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}
      eta_dET = {0, 0, 0, 0, 0, 0, 0, 0, 0, 0, 0, 0, 0, 0, 0, 0, 0, 0}
      eta_epsilonT = 0
    StressCharge "Stress-charge form"
      cE = {2.75121e+011[Pa], 1.78967e+011[Pa], 1.51555e+011[Pa], 0[Pa], 0[Pa], 0[Pa], 1.78967e+011[Pa], 2.75121e+011[Pa], 1.51555e+011[Pa], 0[Pa], 0[Pa], 0[Pa], 1.51555e+011[Pa], 1.51555e+011[Pa], 1.6486e+011[Pa], 0[Pa], 0[Pa], 0[Pa], 0[Pa], 0[Pa], 0[Pa], 5.43478e+010[Pa], 0[Pa], 0[Pa], 0[Pa], 0[Pa], 0[Pa], 0[Pa], 5.43478e+010[Pa], 0[Pa], 0[Pa], 0[Pa], 0[Pa], 0[Pa], 0[Pa], 1.13122e+011[Pa]}
      eES = {0[C/m^2], 0[C/m^2], -2.69289[C/m^2], 0[C/m^2], 0[C/m^2], -2.69289[C/m^2], 0[C/m^2], 0[C/m^2], 3.65468[C/m^2], 0[C/m^2], 21.3043[C/m^2], 0[C/m^2], 21.3043[C/m^2], 0[C/m^2], 0[C/m^2], 0[C/m^2], 0[C/m^2], 0[C/m^2]}
      epsilonrS = diag{1976.8, 1976.8, 111.7}
      eta_cE = {0, 0, 0, 0, 0, 0, 0, 0, 0, 0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}
      eta_eES = {0, 0, 0, 0, 0, 0, 0, 0, 0, 0, 0, 0, 0, 0, 0, 0, 0, 0}
      eta_epsilonS = 0
  mat4: Common "PANI Interphase" on domains 2
    def "Basic"
      density = 1010
    StressCharge "Stress-charge form"
      cE = {1.685e+9[Pa], 1.033e+9[Pa], 1.033e+9[Pa], 0[Pa], 0, 0, 1.033e+9[Pa], 1.685e+9[Pa], 1.033e+9[Pa], 0[Pa], 0, 0, 1.033e+9[Pa], 1.033e+9[Pa], 1.685e+9[Pa], 0[Pa], 0, 0, 0[Pa], 0[Pa], 0[Pa], 3.261e+08[Pa], 0, 0, 0, 0, 0, 0, 3.261e+08[Pa], 0, 0, 0, 0, 0, 0, 3.261e+08[Pa]}
      eES = {0, 0, 0, 0, 0, 0, 0, 0, 0, 0, 0, 0, 0, 0, 0, 0, 0, 0}
      epsilonrS = 8.9
      eta_cE = {0, 0, 0, 0, 0, 0, 0, 0, 0, 0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}
      eta_eES = {0, 0, 0, 0, 0, 0, 0, 0, 0, 0, 0, 0, 0, 0, 0, 0, 0, 0}
      eta_epsilonS = 0

Physics
  solid: SolidMechanics on all domains
    dependent variable u = {u, v, w}
    lemm1: LinearElasticModel "Linear Elastic Material 1" (default)
      SolidModel = Anisotropic
      AnisotropicOption = AnisotropicVo
    free1: Free (default)
    init1: init "Initial Values 1" (default)
    pzm1: PiezoelectricMaterialModel "Piezoelectric Material 1" on all domains
    disp1: Displacement2 "Prescribed Displacement 1" on boundaries 1, 4, 7, 14 | Direction = {1, 0, 0}
    disp2: Displacement2 "Prescribed Displacement 2" on boundaries 2, 5, 8, 13 | Direction = {0, 1, 0}
    disp3: Displacement2 "Prescribed Displacement 3" on boundaries 3, 10-12 | Direction = {0, 0, 1}
  es: Electrostatics on all domains
    dependent variable V
    ccn1: ChargeConservation (default) | materialType = from_mat
    zc1: ZeroCharge (default)
    init1: init "Initial Values 1" (default)
    ccnp1: ChargeConservationPiezo "Charge Conservation, Piezoelectric 1" on all domains
    gnd1: Ground on boundaries 3, 11, 12
    pot1: ElectricPotential on boundaries 10 | V0 = 1

Multiphysics
  pze1: PiezoelectricEffect on all domains | Solid_physics = solid; Electrostatics_physics = es

Mesh
  mesh1 "Mesh 1" (physics-controlled)
    size: MeshSizeDefault | hauto = 4

Studies
  std1 "Study 1"
    param: Parametric "Parametric Sweep" | sweeptype = filled; pname = volfrac; plistarr = range(0.02,0.02,0.18)
    stat: Stationary

Solver configurations
  sol1 "Solution 1" (study std1)
    v1: Variables "Dependent Variables 1"
    s1: Stationary "Stationary Solver 1" | stol = 0.002
      fc1: FullyCoupled | linsolver = d1
      d1: Direct "Suggested Direct Solver (pze1) (merged)" | linsolver = pardiso; pivotperturb = 1.0E-9
  sol2 "Parametric Solutions 1" (study std1)

Datasets
  dset1: Solution | solution = sol1
  dset2: Solution | solution = sol2

Derived values
  int4: IntVolume "Stress11" on all domains | data = dset1; table = tbl1; expr = solid.sx/(a*a*a); unit = N/m^2
  int8: IntVolume "Stress22" on all domains | data = dset1; table = tbl5; expr = solid.sy/(a*a*a); unit = N/m^2
  int5: IntVolume "Stress33" on all domains | data = dset1; table = tbl1; expr = solid.sz/(a*a*a); unit = N/m^2
  int6: IntVolume "ElectricDisplacement3" on all domains | data = dset1; table = tbl1; expr = es.Dz/(a*a*a); unit = C/m^2
  int7: IntVolume "ElectricField3" on all domains | data = dset1; table = tbl1; expr = -es.Ez/(a*a*a); unit = V/m
  int9: IntVolume "All data" on domains 1-3
    data = dset2
    table = tbl1
    expr = {solid.sx/(a*a*a), solid.sy/(a*a*a), solid.sz/(a*a*a), -es.Ez/(a*a*a), es.Dz/(a*a*a)}
    unit = {N/m^2, N/m^2, N/m^2, V/m, C/m^2}

Tables
  tbl1: Table
    // Stress11
    volfrac | solid.sx/(a*a*a) (N/m^2) | solid.sy/(a*a*a) (N/m^2) | solid.sz/(a*a*a) (N/m^2) | -es.Ez/(a*a*a) (V/m) | es.Dz/(a*a*a) (C/m^2)
    0.02 | -62.8043 | -62.8105 | 431.467 | 2e+07 | -0.000679599
    0.04 | -146.934 | -146.934 | 950.68 | 2e+07 | -0.000749447
    0.06 | -261.916 | -261.915 | 1624.49 | 2e+07 | -0.00082215
    0.08 | -416.512 | -416.517 | 2524.66 | 2e+07 | -0.000900219
    0.1 | -623.374 | -623.366 | 3770.17 | 2e+07 | -0.000985894
    0.12 | -900.799 | -900.8 | 5580.34 | 2e+07 | -0.00108197
    0.14 | -1276.23 | -1276.23 | 8417.35 | 2e+07 | -0.00119253
    0.16 | -1791.01 | -1790.99 | 13472.9 | 2e+07 | -0.00132435
    0.18 | -2500.6 | -2500.56 | 25307.5 | 2e+07 | -0.00149055
  tbl2: Table
    // Stress33
    solid.sz/(a*a*a) (N/m^2)
    1613.79
  tbl3: Table
    // ElectricDisplacement3
    es.Dz/(a*a*a) (C/m^2)
    -2.23109e-05
  tbl4: Table
    // ElectricField3
    -es.Ez/(a*a*a) (V/m)
    408163
  tbl5: Table
    // Stress22
    solid.sy/(a*a*a) (N/m^2) | solid.sy/(a*a*a) (N/m^2)
    664.596 | -2500.56

Plots
  pg1: PlotGroup3D "Stress (solid)" | data = dset2
    surf1: Surface | data = dset2; expr = solid.sz
      def: Deform "Deformation" | expr = {u, v, w}; descr = Displacement field
  pg2: PlotGroup3D "Electric Potential (es)" | data = dset1
    mslc1: Multislice | data = dset2; expr = V