// COMSOL Multiphysics 6.1.0.282 model "Multi_Particle_Mixed_AR_C66_ESO_BTO_PANI_50nm_composite.mph"
// Outline of the model tree

Parameters
  a = 100[nm]
  e0 = 1e-4
  volfrac = 0.010125
  r = ((volfrac*a*a*a*21)/(22*4))^(1/3)
  r_H = ((volfrac*a*a*a*21)/(22*4*alpha))^(1/3)
  r_G = ((volfrac*a*a*a*21)/(22*4*beta))^(1/3)
  alpha = 1.3
  beta = 1.15
  H = r_H*alpha
  G = r_G*beta
  t = 5

Variables
  var1 "Variables 1"
    E_m = 34e6  // Elastic modulus of ESO
    nu_m = 0.4  // Poisson's ratio of ESO
    C22_m = C11_m
    C33_m = C11_m
    C11_m = (E_m*(1-nu_m))/((1+nu_m)*(1-(2*nu_m)))
    C12_m = (E_m*nu_m)/((1+nu_m)*(1-(2*nu_m)))
    C13_m = C12_m
    C23_m = C12_m
    C44_m = (C11_m-C12_m)/2
    C55_m = (C11_m-C12_m)/2
    C66_m = (C11_m-C12_m)/2

Geometry
  geom1 "Geometry 1" (3D, length unit nm)
    blk1: Block "ESO Matrix" | base = center; size = {a, a, a}
    elp1: Ellipsoid "Ellipsoid_1 AR_1.3" | pos = {27.63, 26.42, 23.19}; semiaxes = {r_H, r_H, H}
    elp2: Ellipsoid "Ellipsoid_4 AR_1.3" | pos = {-1.8764, -0.11803, 0.5702}; semiaxes = {r_H, r_H, H}
    elp3: Ellipsoid "Ellipsoid_2 AR_1.15" | pos = {27.9699, -23.6081, -24.3184}; semiaxes = {r_G, r_G, G}
    elp4: Ellipsoid "Ellipsoid_5 AR_1.15" | pos = {-21.9012, 27.2484, -25.394}; semiaxes = {r_G, r_G, G}
    elp5: Ellipsoid "Ellipsoid_7 AR_1.15" | pos = {-22.24, -27.62, 25.5107}; semiaxes = {r_G, r_G, G}
    sph1: Sphere "Sphere_3 AR_1.0" | pos = {-27.500, -23.10, -25.00}; r = r
    sph2: Sphere "Sphere_7 AR_1.0" | pos = {24.63, -26.42, 20.19}; r = r
    sph3: Sphere "Sphere_8 AR_1.0" | pos = {-26.24, 26.32, 25.00}; r = r
    sph4: Sphere "Sphere_9 AR_1.0" | pos = {22.8096, 24.1081, -24.93184}; r = r
    elp6: Ellipsoid "PANI_Ellipsoid_1 AR_1.3" | pos = {27.63, 26.42, 23.19}; semiaxes = {r_H+t, r_H+t, H+t}
    elp7: Ellipsoid "PANI_Ellipsoid_4 AR_1.3" | pos = {-1.8764, -0.11803, 0.5702}; semiaxes = {r_H+t, r_H+t, H+t}
    elp8: Ellipsoid "PANI_Ellipsoid_2 AR_1.15" | pos = {27.9699, -23.6081, -24.3184}; semiaxes = {r_G+t, r_G+t, G+t}
    elp9: Ellipsoid "PANI_Ellipsoid_5 AR_1.15" | pos = {-21.9012, 27.2484, -25.394}; semiaxes = {r_G+t, r_G+t, G+t}
    elp10: Ellipsoid "PANI_Ellipsoid_7 AR_1.15" | pos = {-22.24, -27.62, 25.5107}; semiaxes = {r_G+t, r_G+t, G+t}
    sph5: Sphere "PANI_Sphere_3 AR_1.0" | pos = {-27.500, -23.10, -25.00}; r = r+t
    sph6: Sphere "PANI_Sphere_7 AR_1.0" | pos = {24.63, -26.42, 20.19}; r = r+t
    sph7: Sphere "PANI_Sphere_8 AR_1.0" | pos = {-26.24, 26.32, 25.00}; r = r+t
    sph8: Sphere "PANI_Sphere_9 AR_1.0" | pos = {22.8096, 24.1081, -24.93184}; r = r+t
    fin: Finalize "Form Union"

Materials
  mat2: Common "ESO" on domains 1
    def "Basic"
      density = 1010
    StressCharge "Stress-charge form"
      cE = {72.857e+6[Pa], 48.5714e+6[Pa], 48.5714e+6[Pa], 0[Pa], 0, 0, 48.5714e+6[Pa], 72.857e+6[Pa], 48.5714e+6[Pa], 0[Pa], 0, 0, 48.5714e+6[Pa], 48.5714e+6[Pa], 72.857e+6[Pa], 0[Pa], 0, 0, 0[Pa], 0[Pa], 0[Pa], 12.1428e+6[Pa], 0, 0, 0, 0, 0, 0, 12.1428e+6[Pa], 0, 0, 0, 0, 0, 0, 12.1428e+6[Pa]}
      eES = {0, 0, 0, 0, 0, 0, 0, 0, 0, 0, 0, 0, 0, 0, 0, 0, 0, 0}
      epsilonrS = 3.38
      eta_cE = {0, 0, 0, 0, 0, 0, 0, 0, 0, 0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}
      eta_eES = {0, 0, 0, 0, 0, 0, 0, 0, 0, 0, 0, 0, 0, 0, 0, 0, 0, 0}
      eta_epsilonS = 0
  mat3: Common "Barium Titanate" on domains 4, 7-9, 11, 14, 17-19
    def "Basic"
      relpermittivity = diag{1976.8, 1976.8, 111.7}
      density = 6020[kg/m^3]
    StrainCharge "Strain-charge form"
      sE = {8.05e-012[1/Pa], -2.35e-012[1/Pa], -5.24e-012[1/Pa], 0[1/Pa], 0[1/Pa], 0[1/Pa], -2.35e-012[1/Pa], 8.05e-012[1/Pa], -5.24e-012[1/Pa], 0[1/Pa], 0[1/Pa], 0[1/Pa], -5.24e-012[1/Pa], -5.24e-012[1/Pa], 1.57e-011[1/Pa], 0[1/Pa], 0[1/Pa], 0[1/Pa], 0[1/Pa], 0[1/Pa], 0[1/Pa], 1.84e-011[1/Pa], 0[1/Pa], 0[1/Pa], 0[1/Pa], 0[1/Pa], 0[1/Pa], 0[1/Pa], 1.84e-011[1/Pa], 0[1/Pa], 0[1/Pa], 0[1/Pa], 0[1/Pa], 0[1/Pa], 0[1/Pa], 8.84e-012[1/Pa]}
      dET = {0[C/N], 0[C/N], -3.45e-011[C/N], 0[C/N], 0[C/N], -3.45e-011[C/N], 0[C/N], 0[C/N], 8.56e-011[C/N], 0[C/N], 3.92e-010[C/N], 0[C/N], 3.92e-010[C/N], 0[C/N], 0[C/N], 0[C/N], 0[C/N], 0[C/N]}
      epsilonrT = diag{2920, 2920, 168}
      eta_sE = {0, 0, 0, 0, 0, 0, 0, 0, 0, 0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}
      eta_dET = {0, 0, 0, 0, 0, 0, 0, 0, 0, 0, 0, 0, 0, 0, 0, 0, 0, 0}
      eta_epsilonT = 0
    StressCharge "Stress-charge form"
      cE = {2.75121e+011[Pa], 1.78967e+011[Pa], 1.51555e+011[Pa], 0[Pa], 0[Pa], 0[Pa], 1.78967e+011[Pa], 2.75121e+011[Pa], 1.51555e+011[Pa], 0[Pa], 0[Pa], 0[Pa], 1.51555e+011[Pa], 1.51555e+011[Pa], 1.6486e+011[Pa], 0[Pa], 0[Pa], 0[Pa], 0[Pa], 0[Pa], 0[Pa], 5.43478e+010[Pa], 0[Pa], 0[Pa], 0[Pa], 0[Pa], 0[Pa], 0[Pa], 5.43478e+010[Pa], 0[Pa], 0[Pa], 0[Pa], 0[Pa], 0[Pa], 0[Pa], 1.13122e+011[Pa]}
      eES = {0[C/m^2], 0[C/m^2], -2.69289[C/m^2], 0[C/m^2], 0[C/m^2], -2.69289[C/m^2], 0[C/m^2], 0[C/m^2], 3.65468[C/m^2], 0[C/m^2], 21.3043[C/m^2], 0[C/m^2], 21.3043[C/m^2], 0[C/m^2], 0[C/m^2], 0[C/m^2], 0[C/m^2], 0[C/m^2]}
      epsilonrS = diag{1976.8, 1976.8, 111.7}
      eta_cE = {0, 0, 0, 0, 0, 0, 0, 0, 0, 0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}
      eta_eES = {0, 0, 0, 0, 0, 0, 0, 0, 0, 0, 0, 0, 0, 0, 0, 0, 0, 0}
      eta_epsilonS = 0
  mat4: Common "PANI Interphase" on domains 2, 3, 5, 6, 10, 12, 13, 15, 16
    def "Basic"
      density = 1010
    StressCharge "Stress-charge form"
      cE = {1.685e+9[Pa], 1.033e+9[Pa], 1.033e+9[Pa], 0[Pa], 0, 0, 1.033e+9[Pa], 1.685e+9[Pa], 1.033e+9[Pa], 0[Pa], 0, 0, 1.033e+9[Pa], 1.033e+9[Pa], 1.685e+9[Pa], 0[Pa], 0, 0, 0[Pa], 0[Pa], 0[Pa], 3.261e+08[Pa], 0, 0, 0, 0, 0, 0, 3.261e+08[Pa], 0, 0, 0, 0, 0, 0, 3.261e+08[Pa]}
      eES = {0, 0, 0, 0, 0, 0, 0, 0, 0, 0, 0, 0, 0, 0, 0, 0, 0, 0}
      epsilonrS = 8.9
      eta_cE = {0, 0, 0, 0, 0, 0, 0, 0, 0, 0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}
      eta_eES = {0, 0, 0, 0, 0, 0, 0, 0, 0, 0, 0, 0, 0, 0, 0, 0, 0, 0}
      eta_epsilonS = 0

Physics
  solid: SolidMechanics on all domains
    dependent variable u = {u, v, w}
    lemm1: LinearElasticModel "Linear Elastic Material 1" (default)
      SolidModel = Anisotropic
      AnisotropicOption = AnisotropicVo
    free1: Free (default)
    init1: init "Initial Values 1" (default)
    pzm1: PiezoelectricMaterialModel "Piezoelectric Material 1" on all domains
    disp1: Displacement2 "Prescribed Displacement 1" on boundaries 1, 150 | Direction = {0, 1, 1}
    disp2: Displacement2 "Prescribed Displacement 2" on boundaries 2, 5 | Direction = {1, 0, 1}
    disp3: Displacement2 "Prescribed Displacement 3" on boundaries 3, 4 | Direction = {0, 0, 1}
    disp4: Displacement2 "Prescribed Displacement 4" on boundaries 150 | Direction = {0, 1, 1}; U0 = {0, 0, 0}
    disp5: Displacement2 "Prescribed Displacement 5" on boundaries 5 | Direction = {1, 0, 1}; U0 = {2*y*e0, 0, 0}
    disp6: Displacement2 "Prescribed Displacement 6" on boundaries 4 | Direction = {0, 0, 1}
  es: Electrostatics on all domains
    dependent variable V
    ccn1: ChargeConservation (default) | materialType = from_mat
    zc1: ZeroCharge (default)
    init1: init "Initial Values 1" (default)
    ccnp1: ChargeConservationPiezo "Charge Conservation, Piezoelectric 1" on all domains
    gnd1: Ground on boundaries 3

Multiphysics
  pze1: PiezoelectricEffect on all domains | Solid_physics = solid; Electrostatics_physics = es

Mesh
  mesh1 "Mesh 1" (physics-controlled)
    size: MeshSizeDefault | hauto = 4

Studies
  std1 "Study 1"
    param: Parametric "Parametric Sweep"
      sweeptype = filled
      pname = volfrac
      plistarr = range(0.001125,0.001125,0.01575)
    stat: Stationary

Solver configurations
  sol1 "Solution 1" (study std1)
    v1: Variables "Dependent Variables 1"
    s1: Stationary "Stationary Solver 1" | stol = 0.002
      fc1: FullyCoupled | linsolver = d1
      d1: Direct "Suggested Direct Solver (pze1) (merged)" | linsolver = pardiso; pivotperturb = 1.0E-9
  sol2 "Parametric Solutions 1" (study std1)

Datasets
  dset1: Solution | solution = sol1
  dset2: Solution | solution = sol2

Derived values
  int8: IntVolume "Stress12" on all domains | data = dset1; table = tbl5; expr = solid.sxy/(a*a*a); unit = N/m^2
  int9: IntVolume "2Strain12" on all domains | data = dset1; table = tbl5; expr = 2*solid.eXY/(a*a*a); unit = 1
  int10: IntVolume "All Data" on all domains
    data = dset2
    table = tbl5
    expr = {solid.sxy/(a*a*a), 2*solid.eXY/(a*a*a)}
    unit = {N/m^2, 1}

Tables
  tbl1: Table
    // Stress11
    solid.sy/(a*a*a) (N/m^2) | solid.sz/(a*a*a) (N/m^2) | solid.eYY/(a*a*a) (1) |  | 
    598.248 | 1613.79 | -2.23109e-05 | 408163 | 664.596
  tbl2: Table
    // Stress33
    solid.sz/(a*a*a) (N/m^2)
    1613.79
  tbl4: Table
    // ElectricField3
    solid.eYY/(a*a*a) (1)
    408163
  tbl5: Table
    // Stress22
    volfrac | solid.sxy/(a*a*a) (N/m^2) | 2*solid.eXY/(a*a*a) (1)
    0.001125 | 1363.87 | 0.0001
    0.00225 | 1444.82 | 0.0001
    0.003375 | 1520.03 | 0.0001
    0.0045 | 1593.65 | 0.0001
    0.005625 | 1668.04 | 0.0001
    0.00675 | 1743.94 | 0.0001
    0.007875 | 1823.66 | 0.0001
    0.009 | 1907.51 | 0.0001
    0.010125 | 1996.49 | 0.0001
    0.01125 | 2091.81 | 0.0001
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
Plots
  pg1: PlotGroup3D "Stress (solid)" | data = dset1
    surf1: Surface | expr = solid.eXX
      def: Deform "Deformation" | expr = {u, v, w}; descr = Displacement field
  pg2: PlotGroup3D "Electric Potential (es)" | data = dset1
    mslc1: Multislice | expr = V